// COMSOL Multiphysics 6.4.0.293 model "infinite_cluster_2d.mph"
// Outline of the model tree

Parameters
  kB = 8.6173303e-5*e [V/K]  // Boltzmann constant (eV/K)
  F = 96485.3329 [A*s/mol]  // Faraday constant (As/mol)
  e = 1.602e-19 [A*s]  // Unit charge (As)
  NA = F/e  // Avogadro constant (1/mol)
  eps0 = 8.854187e-12 [F/m]  // Vacuum permittivity (F/m)
  T = 293 [K]  // Absolute temperature (K)
  c0 = 1 [mol/m^3]  // Bulk ion concentration (mol/m^3)
  mu = 5e-8 [m^2/V/s]  // Ion mobility (m²/Vs)
  D = mu*kB*T/e  // Ion diffusivity (m²/s)
  epsW = 80  // Relative permittivity of electrolyte (-)
  epsP = 4.5  // Relative permittivity of particle (-)
  sigma0 = 2*c0*mu*F  // Bulk electr. conductivity (S/m)
  lambda = sqrt(eps0*epsW*kB*T/(2*e*c0*F))  // Debye length (m)
  a = 5e-6 [m]  // Particle radius (m)
  L = 1/2*sqrt(pi*a^2/0.64)*0+a+d/2  // Radius / half length of domain (m)
  E0 = 1 [V/m]  // External electrical field (V/m)
  muS = mu/10  // Ion mobility in Stern layer (m²/Vs)
  DS = muS*kB*T/e  // Ion diffusivity in Stern layer (m²/s)
  sS = -p*surfcharP  // Stern layer Surface charge density of Particle (C/m²)
  zetaP = -2*kB*T/e*asinh(sD/(lambda*4*F*c0))  // Zeta Potential of Particle (V)
  sigmaS = 2*muS*sS/a  // Stern layer electr. conductivity (S/m)
  surfcharP = -0.01 [C/m^2]  // Total Surface charge density of Particle (C/m²)
  p = 0.5  // Partition coefficient
  sD = -surfcharP - sS  // Diffuse layer Surface charge density of Particle (C/m²)
  volfrac = pi*a^2/(2*L)^2  // Volume Fraction
  d = sqrt(pi/0.64)*0+3e-7

Variables
  var1 "Variables 1"
    Rc = sigma0/(i*freq*2*pi*eps0*epsW)*(gamma*a+1)/((gamma*a)^2+2*(gamma*a+1))  // Coefficient R (Garciá et al., 1985)
    gamma = sqrt(1/lambda^2+i*freq*2*pi/D)  // Inverse length
    A = (epsP-(epsWg+epsP*Rc))/(epsP+2*(epsWg+epsP*Rc))*a^3*E0  // Coefficient A
    epsWg = epsW+sigma0/(1i*freq*2*pi*eps0)  // Generalized dielectric perimttivity of the fluid
    f = A/(a^3*E0)  // Reflection coefficient
    sana = (1+2*nu*f)/(1-nu*f)  // Normalized conductivity
    nu = 2*a^3/(3*L^3)  // Volume fraction of inclusion (Kugel in Zylinder)
  var4 "Lyklema 2D"
    sanaL = (1+nu_2D*fL)/(1-nu_2D*fL)  // 2D-Normalized conductivity
    M = 1 + sS/(2*lambda*F*c0*cosh(e*zetaP/(2*kB*T)))  // Lyklema correction coefficient (für zetaP=0)
    tbs = a^2/(DS*M)  // 2D-Time constant
    Ka = sigma0 + i*freq*2*pi*eps0*epsW  // Complex conductivity of fluid
    Ki = i*freq*2*pi*epsP*eps0+i*freq*2*pi*sigmaS_2D*tbs/(1+i*freq*2*pi*tbs)  // Effective conductivity of inclusion
    fL = (Ki-Ka)/(Ka+Ki)  // 2D-Reflection coefficient
    sigmaS_2D = sigmaS/2  // 2D-Stern layer electr. conductivity (S/m)
    nu_2D = pi*a^2/(2*L)^2  // Volume fraction of inclusion
  var3 "DukhinShilov"
    Sigma_p = +2*e*c0*NA*lambda*(exp(-e*zetaP/(2*kB*T))-1)  // Cation surface charge density diffuse layer (C/m²)
    Sigma_n = -2*e*c0*NA*lambda*(exp(+e*zetaP/(2*kB*T))-1)  // Anion surface charge density diffuse layer (C/m²)
    sigmaD = abs(2*mu/a*(Sigma_p + Sigma_n))  // Diffuse layer electr. conductivity (S/m)
    Du = sigmaD / (2 * sigma0)  // Dukhin number
    S = ((Du + 1)^2 * sigma0^2) / ((2*mu*Sigma_p/a + sigma0)*(-2*mu*Sigma_n/a + sigma0))  // coefficient
    tau = a^2*S/(2*D)  // time constant
    f_d = (2*Du - 1) / (2*Du + 2) - 3*S/2 * (2*mu*Sigma_p/a + 2*mu*Sigma_n/a)^2/(sigma0^2 * (2*Du + 2)^2) * (1 - (i*freq*2*pi*tau)/(1 + sqrt(i*freq*2*pi*2*tau/S) + i*freq*2*pi*tau))  // reflection coefficient
    sigma0_complex = sigma0 + i*freq*2*pi*eps0*epsW  // Complex conductivity of fluid
    sigmaD_complex = sigma0_complex * (1 + 2*f_d) / (1 - f_d)  // Complex conductivity of inclusion
    sanaD = (1+2*nu*f_D)/(1-nu*f_D)  // nu muss immer, wenn effektive Leitfähigkeit des gesamten Bereichs berechnet wird
    f_D = (sigmaD_complex+Ki-Ka)/(2*Ka+sigmaD_complex+Ki)

Selections
  sel1: Explicit "Particles" on domains 2, 3
  sel2: Explicit "Particle Boundaries" on boundaries 10, 11
  sel9: Explicit "Bubbles" on no domains
  sel10: Explicit "Bubble Boundaries" on no boundaries
  sel3: Explicit "Water" on domains 1
  sel4: Explicit "Upper+Lower Boundaries" on boundaries 2-5
  sel5: Explicit "Domain Boundaries Water" on boundaries 1-3, 7, 8
  sel6: Explicit "Point far away" on no points
  sel7: Explicit "S = 0" on points 3, 4
  sel8: Explicit "Zero Flux" on points 6, 8

Couplings
  intop15: Integration on selection sel3 | opname = intopW
  intop16: Integration on selection sel1 | opname = intopP
  intop17: Integration on selection sel2 | opname = intopS

Geometry
  geom2 "Geometry 2" (2D, length unit m)
    r1: Rectangle | size = {L, 2*L}; base = center; pos = {L/2, 0}
    c2: Circle | r = a; angle = 360/4; pos = {L, -L}; rot = 90; iscircularsectorold = on
    c3: Circle | r = a; angle = 360/4; pos = {L, L}; rot = 180; iscircularsectorold = on
    pt2: Point | p = {L, 0}
    fin: Finalize "Form Union"

Materials
  Luft: Common "Material 1" on no domains

Physics
  c2: CoefficientFormPDE "Particle - Static Electric potential - U0" on selection sel1
    dependent variable U0P
    Units.DependentVariableQuantity = none
    Units.CustomDependentVariableUnit = V
    Units.CustomSourceTermUnit = C/m^3
    cfeq1: CoefficientFormPDE (default) | c = {eps0*epsP, 0, 0, eps0*epsP}; a = 0; f = 0; da = 0; al = {0, 0}; ga = {0, 0}
    zflx1: ZeroFluxBoundary "Zero Flux 1" (default)
    init1: init "Initial Values 1" (default) | U0P = 0; U0Pt = 0; n = 1; nt = 1
    dir2: DirichletBoundary "Dirichlet Boundary Condition 1" on selection sel2 | r = zetaP
  c5: CoefficientFormPDE "Water - Static Electric potential - U0" on selection sel3
    dependent variable U0W
    Units.CustomSourceTermUnit = C/m^3
    cfeq1: CoefficientFormPDE (default) | c = {eps0*epsW, 0, 0, eps0*epsW}; f = -2*c0*F*sinh(U0W*e/(kB*T))
    zflx1: ZeroFluxBoundary "Zero Flux 1" (default)
    init1: init "Initial Values 1" (default)
    dir3: DirichletBoundary "Dirichlet Boundary Condition 2" on selection sel2 | r = zetaP; useDirichletCondition = 1
  c6: CoefficientFormPDE "Cations - p" on selection sel3
    dependent variable cp
    Units.CustomSourceTermUnit = mol/s/m^3
    cfeq1: CoefficientFormPDE (default)
      c = {D, 0, 0, D}
      a = freq*2*pi*i
      al = {mu*U0Wx, mu*U0Wy}
      ga = {-mu*c0 * exp(-e/(kB * T)*U0W) * UWx, -mu*c0 * exp(-e/(kB * T)*U0W) * UWy}
    zflx1: ZeroFluxBoundary "Zero Flux 1" (default)
    init1: init "Initial Values 1" (default) | cp = 0; cpt = 0
    dir1: DirichletBoundary "Dirichlet Boundary Condition 1" on selection sel4 | r = 0
    pc1: PeriodicCondition on selection sel4 | destinationDomains: boundaries 3
  c7: CoefficientFormPDE "Anions - n" on selection sel3
    dependent variable cn
    Units.DependentVariableQuantity = none
    Units.CustomDependentVariableUnit = mol/m^3
    Units.SourceTermQuantity = none
    Units.CustomSourceTermUnit = mol/s/m^3
    cfeq1: CoefficientFormPDE (default)
      c = {D, 0, 0, D}
      a = i*freq*2*pi
      al = {-mu*U0Wx, -mu*U0Wy}
      ga = {mu*c0*exp(e/(kB * T)*U0W)*UWx, mu*c0*exp(e/(kB * T)*U0W)*UWy}
    zflx1: ZeroFluxBoundary "Zero Flux 1" (default)
    init1: init "Initial Values 1" (default) | cn = 0; cnt = 0
    dir1: DirichletBoundary "Dirichlet Boundary Condition 1" on selection sel4 | r = 0
    pc1: PeriodicCondition on selection sel4 | destinationDomains: boundaries 3
  c8: CoefficientFormPDE "Particle - Electric potential - UP" on selection sel1
    dependent variable UP
    Units.CustomSourceTermUnit = C/m^3
    cfeq1: CoefficientFormPDE (default) | c = {eps0*epsP, 0, 0, eps0*epsP}; f = 0
    zflx1: ZeroFluxBoundary "Zero Flux 1" (default)
    init1: init "Initial Values 1" (default) | UP = 1; UPt = 1
    flux1: FluxBoundary "Flux/Source 1" on selection sel2 | g = S + (nx*UWx + ny*UWy)*eps0*epsW
    dir1: DirichletBoundary "Dirichlet Boundary Condition 1" on selection sel2 | r = UW
    dir2: DirichletBoundary "Dirichlet Boundary Condition 2" on selection sel4 | r = -y*E0
    pc1: PeriodicCondition on selection sel4 | PeriodicType = AntiPeriodicity; destinationDomains: boundaries 5
  c3: CoefficientFormPDE "Water - Electric potential - UW" on selection sel3
    dependent variable UW
    Units.DependentVariableQuantity = none
    Units.CustomDependentVariableUnit = V
    Units.CustomSourceTermUnit = C/m^3
    cfeq1: CoefficientFormPDE (default) | c = {eps0*epsW, 0, 0, eps0*epsW}; f = F*(cp-cn); da = 0
    zflx1: ZeroFluxBoundary "Zero Flux 1" (default)
    init1: init "Initial Values 1" (default) | UW = 0; UWt = 0; U = 1; Ut = 1
    dir1: DirichletBoundary "Dirichlet Boundary Condition 1" on selection sel4 | r = -y*E0
    flux1: FluxBoundary "Flux/Source 1" on selection sel2 | g = S + (nx*UPx + ny*UPy)*eps0*epsP
    dir2: DirichletBoundary "Dirichlet Boundary Condition 2" on selection sel2 | r = UP
    pc1: PeriodicCondition on selection sel4 | PeriodicType = AntiPeriodicity; destinationDomains: boundaries 3
  cb2: CoefficientFormBoundaryPDE "Coefficient Form Boundary PDE - S" on selection sel2
    dependent variable S
    Units.CustomDependentVariableUnit = C / m^2
    Units.CustomSourceTermUnit = C / s / m^2
    cfeq1: CoefficientFormPDE (default) | c = {DS, 0, 0, DS}; a = i*freq*2*pi; ga = {-muS*sS*UWx, -muS*sS*UWy}
    init1: init "Initial Values 1" (default)
    dir1: DirichletBoundary "Dirichlet Boundary Condition 1" on selection sel7 | r = 0
    zflx1: ZeroFluxBoundary "Zero Flux 1" on selection sel8

Mesh
  mesh2 "Mesh 2"
    size: MeshSizeDefault | hmax = L/20; hmin = pi*a/120; hgrad = 1.3; hauto = 4; custom = on
    size1: Size on selection sel2 | hmax = pi*a/120; custom = on
    ftri1: FreeTri "Free Triangular 1" on remaining entities
    bl1: BndLayer "Boundary Layers 1" on entire geometry
      blp: BndLayerProp "Boundary Layer Properties" (disabled) on selection sel2
        blnlayers = 40
        blstretch = 1.05
        inittype = blhmin
        blhmin = lambda/20
        adjustdir = false
      blp1: BndLayerProp "Boundary Layer Properties 1" (disabled) on selection sel2
        inittype = blhmin
        blhmin = lambda/2
        adjustdir = false
      blp2: BndLayerProp "Boundary Layer Properties 2" on selection sel10
        blnlayers = 13
        inittype = blhmin
        blhmin = lambda/13
        adjustdir = false
      blp3: BndLayerProp "Boundary Layer Properties 3" on selection sel2
        blnlayers = 13
        inittype = blhmin
        blhmin = lambda/13
        adjustdir = false

Studies
  std2 "Stationary + Frequency Depenent Problem"
    stat: Stationary | solve for = {c2, c5, comp2}
    freq1: Frequency "Frequency Domain" | plist = 10^{range(-1,1/49,5)}/2/pi; solve for = {c6, c7, c8, c3, cb2, comp2}
  std1 "only Frequency Dependent Problem"
    freq: Frequency "Frequency Domain" (disabled)
      plist = 10^{range(-2,0.179487179487,5)}
      solve for = {c6, c7, c8, c3, cb2, comp2}
      usesol = on
      notsolmethod = sol
      notstudy = std2

Solver configurations
  sol1 "Solution 1" (study std1)
    v1: Variables "Dependent Variables 1"
  sol7 "Solution 7" (study std2)
    v1: Variables "Dependent Variables 1"
    s1: Stationary "Stationary Solver 1"
      dDef: Direct
      fc1: FullyCoupled | linsolver = dDef
    su1: StoreSolution "Solution Store 1"
    v2: Variables "Dependent Variables 2" | initmethod = sol; notsolmethod = sol
    s2: Stationary "Stationary Solver 2" | linpmethod = sol
      dDef: Direct
      p1: Parametric | pname = freq; plistarr = 10^{range(-1,1/49,5)}/2/pi; punit = Hz; pcontinuationmode = no
      fc1: FullyCoupled | linsolver = dDef
  sol9 "Parametric Solutions 2" (study std2)
  sol10 "Solution Store 1" (study std2)

Datasets
  dset4: Solution | solution = none
  dset5: Solution | solution = none
  dset6: Solution | solution = none
  dset7: Solution | solution = none
  dset8: Solution | solution = none
  dset9: Solution | solution = none
  dset10: Solution | solution = sol7
  dset12: Solution | solution = sol9
  dset13: Solution | solution = sol10

Derived values
  gev3: EvalGlobal "Normalized effective conductivity"
    data = dset10
    table = tbl3
    expr = ( intopW(-D*F*d(c0*exp(-e/(kB*T)*U0W)+cp, y)+D*F*d(c0*exp(+e/(kB*T)*U0W)+cn, y)-F*mu*(c0*exp(-e/(kB * T)*U0W)+c0*exp(+e/(kB * T)*U0W)+cp+cn)*(U0Wy+UWy)-i*2*pi*freq*eps0*epsW*UWy)/Ka/E0 + intopP(-i*2*pi*freq*eps0*epsP*UPy)/Ka/E0 + intopS(i*2*pi*freq*(y-sign(y)*L-if(S==0, 0, intopS(y*(S+sS)) / intopS(S+sS)))*S)/Ka/E0) / (2*L^2)
    unit = 1
    descr = Normalized effective conductiviy

Plots
  pg9: PlotGroup1D "Imag" | data = dset12
    glob1: Global "Num"
      expr = imag( intopW(-D*F*d(c0*exp(-e/(kB*T)*U0W)+cp, y)+D*F*d(c0*exp(+e/(kB*T)*U0W)+cn, y)-F*mu*(c0*exp(-e/(kB * T)*U0W)+c0*exp(+e/(kB * T)*U0W)+cp+cn)*(U0Wy+UWy)-i*2*pi*freq*eps0*epsW*UWy)/Ka/E0 + intopP(-i*2*pi*freq*eps0*epsP*UPy)/Ka/E0 + intopA(-i*2*pi*freq*eps0*UAy)/Ka/E0+ intopS(i*2*pi*freq*(y-sign(y)*L-if(S==0, 0, intopS(y*(S+sS)) / intopS(S+sS)))*S)/Ka/E0 + intopSA(i*2*pi*freq*y*S_air)/Ka/E0) / (2*L^2)
      descr = num2
    glob2: Global "Ana" | expr = imag(sanaL)
  pg24: PlotGroup1D "Real" | data = none
    glob1: Global "Num"
      expr = real( intopW(-D*F*d(c0*exp(-e/(kB*T)*U0W)+cp, y)+D*F*d(c0*exp(+e/(kB*T)*U0W)+cn, y)-F*mu*(c0*exp(-e/(kB * T)*U0W)+c0*exp(+e/(kB * T)*U0W)+cp+cn)*(U0Wy+UWy)-i*2*pi*freq*eps0*epsW*UWy)/Ka/E0 + intopP(-i*2*pi*freq*eps0*epsP*UPy)/Ka/E0 + intopS(i*2*pi*freq*(y-sign(y)*L-if(S==0, 0, intopS(y*(S+sS)) / intopS(S+sS)))*S)/Ka/E0) / (2*L^2)
      unit = 1
      descr = num
    glob2: Global "Ana" (disabled) | expr = real(sanaL)
  pg26: PlotGroup2D "Particle - Static Electric potential - U0" | data = dset12
    surf1: Surface | expr = U0P
  pg27: PlotGroup2D "Water - Static Electric potential - U0" | data = dset12
    surf1: Surface | expr = U0W
  pg28: PlotGroup2D "Cations - p" | data = dset12
    surf1: Surface | expr = cp
  pg29: PlotGroup2D "Anions - n" | data = dset12
    surf1: Surface | expr = cn
  pg31: PlotGroup2D "Particle - Electric potential - UP" | data = dset12
    surf1: Surface | expr = UP
  pg32: PlotGroup2D "Water - Electric potential - UW" | data = dset12
    surf1: Surface | expr = imag(UW)
    con1: Contour | expr = imag(UW); contourtype = tubes; tuberadiusscale = 1e-8
  pg34: PlotGroup2D "Coefficient Form Boundary PDE - S" | data = dset12
    line1: Line | expr = S
  pg35: PlotGroup2D "Particle - Static Electric potential - U0.1" | data = dset10
    surf1: Surface "Oberfläche 1" | expr = U0P
  pg36: PlotGroup2D "Water - Static Electric potential - U0.1" | data = dset10
    surf1: Surface "Oberfläche 1" | expr = U0W
  pg37: PlotGroup2D "Cations - p 1" | data = dset10
    surf1: Surface "Oberfläche 1" | expr = cp
  pg38: PlotGroup2D "Anions - n 1" | data = dset10
    surf1: Surface "Oberfläche 1" | expr = cn
  pg39: PlotGroup2D "Particle - Electric potential - UP 1" | data = dset10
    surf1: Surface "Oberfläche 1" | expr = UP
  pg40: PlotGroup2D "Water - Electric potential - UW 1" | data = dset10
    surf1: Surface "Oberfläche 1" | expr = UW
  pg41: PlotGroup2D "Coefficient Form Boundary PDE - S 1" | data = dset10
    line1: Line "Linie 1" | expr = S

Exports
  tbl1: Table | table = tbl2