// COMSOL Multiphysics 6.4.0.293 model "finite_cluster_2d_overlap_5by5_with_inner.mph"
// Outline of the model tree

Parameters
  kB = 8.6173303e-5*e [V/K]  // Boltzmann constant (eV/K)
  F = 96485.3329 [A*s/mol]  // Faraday constant (As/mol)
  e = 1.602e-19 [A*s]  // Unit charge (As)
  NA = F/e  // Avogadro constant (1/mol)
  eps0 = 8.854187e-12 [F/m]  // Vacuum permittivity (F/m)
  T = 293 [K]  // Absolute temperature (K)
  c0 = 1 [mol/m^3]  // Bulk ion concentration (mol/m^3)
  mu = 5e-8 [m^2/V/s]  // Ion mobility (m²/Vs)
  D = mu*kB*T/e  // Ion diffusivity (m²/s)
  epsW = 80  // Relative permittivity of electrolyte (-)
  epsP = 4.5  // Relative permittivity of particle (-)
  sigma0 = 2*c0*mu*F  // Bulk electr. conductivity (S/m)
  lambda = sqrt(eps0*epsW*kB*T/(2*e*c0*F))  // Debye length (m)
  a = 5.0E-6[m]  // Particle radius (m)
  L = 1/2*sqrt(size^2*pi*a^2/0.101)  // Radius / half length of domain (m)
  E0 = 1 [V/m]  // External electrical field (V/m)
  muS = mu/10  // Ion mobility in Stern layer (m²/Vs)
  DS = muS*kB*T/e  // Ion diffusivity in Stern layer (m²/s)
  sS = -p*surfcharP  // Stern layer Surface charge density of Particle (C/m²)
  zetaP = -2*kB*T/e*asinh(sD/(lambda*4*F*c0))  // Zeta Potential of Particle (V)
  sigmaS = 2*muS*sS/a  // Stern layer electr. conductivity (S/m)
  surfcharP = -0.01 [C/m^2]  // Total Surface charge density of Particle (C/m²)
  p = 0.5  // Partition coefficient
  sD = -surfcharP - sS  // Diffuse layer Surface charge density of Particle (C/m²)
  d = 1.99*a  // Distance between particle centers (m)
  size = 5  // Number of particles per side (m)

Variables
  var1 "Variables 1"
    Rc = sigma0/(i*freq*2*pi*eps0*epsW)*(gamma*a+1)/((gamma*a)^2+2*(gamma*a+1))  // Coefficient R (Garciá et al., 1985)
    gamma = sqrt(1/lambda^2+i*freq*2*pi/D)  // Inverse length
    A = (epsP-(epsWg+epsP*Rc))/(epsP+2*(epsWg+epsP*Rc))*a^3*E0  // Coefficient A
    epsWg = epsW+sigma0/(1i*freq*2*pi*eps0)  // Generalized dielectric perimttivity of the fluid
    f = A/(a^3*E0)  // Reflection coefficient
    sana = (1+2*nu*f)/(1-nu*f)  // Normalized conductivity
    nu = 2*a^3/(3*L^3)  // Volume fraction of inclusion (Kugel in Zylinder)
  var4 "Lyklema 2D"
    sanaL = (1+nu_2D*fL)/(1-nu_2D*fL)  // 2D-Normalized conductivity
    M = 1 + sS/(2*lambda*F*c0*cosh(e*zetaP/(2*kB*T)))  // Lyklema correction coefficient (für zetaP=0)
    tbs = a^2/(DS*M)  // 2D-Time constant
    Ka = sigma0 + i*freq*2*pi*eps0*epsW  // Complex conductivity of fluid
    Ki = i*freq*2*pi*epsP*eps0+i*freq*2*pi*sigmaS_2D*tbs/(1+i*freq*2*pi*tbs)  // Effective conductivity of inclusion
    fL = (Ki-Ka)/(Ka+Ki)  // 2D-Reflection coefficient
    sigmaS_2D = sigmaS/2  // 2D-Stern layer electr. conductivity (S/m)
    nu_2D = size^2*pi*a^2/(2*L)^2  // Volume fraction of inclusion
  var3 "DukhinShilov"
    Sigma_p = +2*e*c0*NA*lambda*(exp(-e*zetaP/(2*kB*T))-1)  // Cation surface charge density diffuse layer (C/m²)
    Sigma_n = -2*e*c0*NA*lambda*(exp(+e*zetaP/(2*kB*T))-1)  // Anion surface charge density diffuse layer (C/m²)
    sigmaD = abs(2*mu/a*(Sigma_p + Sigma_n))  // Diffuse layer electr. conductivity (S/m)
    Du = sigmaD / (2 * sigma0)  // Dukhin number
    S = ((Du + 1)^2 * sigma0^2) / ((2*mu*Sigma_p/a + sigma0)*(-2*mu*Sigma_n/a + sigma0))  // coefficient
    tau = a^2*S/(2*D)  // time constant
    f_d = (2*Du - 1) / (2*Du + 2) - 3*S/2 * (2*mu*Sigma_p/a + 2*mu*Sigma_n/a)^2/(sigma0^2 * (2*Du + 2)^2) * (1 - (i*freq*2*pi*tau)/(1 + sqrt(i*freq*2*pi*2*tau/S) + i*freq*2*pi*tau))  // reflection coefficient
    sigma0_complex = sigma0 + i*freq*2*pi*eps0*epsW  // Complex conductivity of fluid
    sigmaD_complex = sigma0_complex * (1 + 2*f_d) / (1 - f_d)  // Complex conductivity of inclusion
    sanaD = (1+2*nu*f_D)/(1-nu*f_D)  // nu muss immer, wenn effektive Leitfähigkeit des gesamten Bereichs berechnet wird
    f_D = (sigmaD_complex+Ki-Ka)/(2*Ka+sigmaD_complex+Ki)

Selections
  sel1: Explicit "Particles" on domains 2-10, 15-28, 33-46, 51-64, 69-82
  sel2: Explicit "Particle Boundaries" on boundaries 5-264
  sel3: Explicit "Water" on domains 1, 11-14, 29-32, 47-50, 65-68
  sel4: Explicit "Upper+Lower Boundaries" on boundaries 2, 3
  sel5: Explicit "Domain Boundaries" on boundaries 1-4
  sel6: Explicit "Point far away" on points 1, 2, 183, 184
  sel7: Explicit "Boundaries overlap" on boundaries 5-14, 23, 32-40, 52, 54, 56, 58, 60, 62, 64, 66, 68, 70, 79, 88-96, 108, 110, 112, 114, 116, 118, 120, 122, 124, 126, 135, 144-152, 164, 166, 168, 170, 172, 174, 176, 178, 180, 182, 191, 200-208, 220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

Couplings
  intop13: Integration on boundaries 3 | opname = intop1
  intop2: Integration on boundaries 5-14, 18, 20, 22, 23, 27, 29, 31-40, 52, 54, 56, 58, 60, 62, 64, 66, 68, 70, 74, 76, 78, 79, 82-96, 100, 107-126, 130, 132, 134, 135, 139-141, 143-151, 156, 158, 160, 163-178, 180-182, 186, 188, 190, 191, 195-208, 212, 216, 219-229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
  intop14: Integration on selection sel3 | opname = intop3
  aveop1: Average on selection sel3
  aveop2: Average on domains 1, 11-14, 29-32, 47-50, 65-68
  aveop3: Average on selection geom2_csel1_dom | opname = aveopP
  aveop4: Average on selection geom2_csel1_bnd | opname = aveopS
  intop15: Integration on selection sel3 | opname = intopW
  intop16: Integration on selection geom2_csel1_dom | opname = intopP
  intop17: Integration on boundaries 5-14, 18, 20, 22, 23, 27, 29, 31-40, 52, 54, 56, 58, 60, 62, 64, 66, 68, 70, 74, 76, 78, 79, 82-96, 100, 107-126, 130, 132, 134, 135, 139-141, 143-151, 156, 158, 160, 163-178, 180-182, 186, 188, 190, 191, 195-208, 212, 216, 219-229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
    opname = intopS
  intop18: Integration on boundaries 5, 8, 10, 12, 14, 16, 18, 20, 22, 25, 27, 29, 31-33, 35, 37, 39, 42, 44, 46, 48, 50, 53, 54, 57, 58, 61, 62, 65, 66, 69, 70, 72, 74, 76, 78, 81, 83, 85, 87-89, 91, 93, 95, 98, 100, 102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
    opname = intop4
  intop19: Integration on boundaries 5, 8, 10, 12, 14, 16, 18, 20, 22, 25, 27, 29, 31-33, 35, 37, 39, 42, 44, 46, 48, 50, 53, 54, 57, 58, 61, 62, 65, 66, 69, 70, 72, 74, 76, 78, 81, 83, 85, 87-89, 91, 93, 95, 98, 100, 102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
    opname = intopS2

Geometry
  geom2 "Geometry 2" (2D, length unit m)
    r1: Rectangle | size = {2*L, 2*L}; base = center
    c1: Circle | r = a; pos = {-(size/2-0.5)*d, -(size/2-0.5)*d}
    arr1: Array
      input = c1
      size = {size, size}
      fullsize = {size, size}
      displ = {d, d}
      indexattrtag = arr1.index
      indexattrtags = {arr1.index1, arr1.index2}
      contributeto = csel1
    uni1: Union "Vereinigung 1" | input = arr1
    fin: Finalize "Form Union"

Materials
  Luft: Common "Material 1" on no domains

Physics
  c2: CoefficientFormPDE "Particle - Static Electric potential - U0" on selection geom2_csel1_dom
    dependent variable U0P
    Units.DependentVariableQuantity = none
    Units.CustomDependentVariableUnit = V
    Units.CustomSourceTermUnit = C/m^3
    cfeq1: CoefficientFormPDE (default) | c = {eps0*epsP, 0, 0, eps0*epsP}; a = 0; f = 0; da = 0; al = {0, 0}; ga = {0, 0}
    zflx1: ZeroFluxBoundary "Zero Flux 1" (default)
    init1: init "Initial Values 1" (default) | U0P = 0; U0Pt = 0; n = 1; nt = 1
    dir2: DirichletBoundary "Dirichlet Boundary Condition 1" on selection sel7 | r = zetaP
  c5: CoefficientFormPDE "Water - Static Electric potential - U0" on selection sel3
    dependent variable U0W
    Units.CustomSourceTermUnit = C/m^3
    cfeq1: CoefficientFormPDE (default) | c = {eps0*epsW, 0, 0, eps0*epsW}; f = -2*c0*F*sinh(U0W*e/(kB*T))
    zflx1: ZeroFluxBoundary "Zero Flux 1" (default)
    init1: init "Initial Values 1" (default)
    dir1: DirichletBoundary "Dirichlet Boundary Condition 1" (disabled) on selection sel5 | r = 0
    dir3: DirichletBoundary "Dirichlet Boundary Condition 2" on selection sel7 | r = zetaP; useDirichletCondition = 1
    dir4: DirichletBoundary "Dirichlet Boundary Condition 4" (disabled) on selection sel6 | r = 0
  c6: CoefficientFormPDE "Cations - p" on selection sel3
    dependent variable cp
    Units.CustomSourceTermUnit = mol/s/m^3
    cfeq1: CoefficientFormPDE (default)
      c = {D, 0, 0, D}
      a = freq*2*pi*i
      al = {mu*U0Wx, mu*U0Wy}
      ga = {-mu*c0 * exp(-e/(kB * T)*U0W) * UWx, -mu*c0 * exp(-e/(kB * T)*U0W) * UWy}
    zflx1: ZeroFluxBoundary "Zero Flux 1" (default)
    init1: init "Initial Values 1" (default) | cp = 1; cpt = 1
    dir1: DirichletBoundary "Dirichlet Boundary Condition 1" on selection sel4 | r = 0
  c7: CoefficientFormPDE "Anions - n" on selection sel3
    dependent variable cn
    Units.DependentVariableQuantity = none
    Units.CustomDependentVariableUnit = mol/m^3
    Units.SourceTermQuantity = none
    Units.CustomSourceTermUnit = mol/s/m^3
    cfeq1: CoefficientFormPDE (default)
      c = {D, 0, 0, D}
      a = i*freq*2*pi
      al = {-mu*U0Wx, -mu*U0Wy}
      ga = {mu*c0*exp(e/(kB * T)*U0W)*UWx, mu*c0*exp(e/(kB * T)*U0W)*UWy}
    zflx1: ZeroFluxBoundary "Zero Flux 1" (default)
    init1: init "Initial Values 1" (default) | cn = 1; cnt = 1
    dir1: DirichletBoundary "Dirichlet Boundary Condition 1" on selection sel4 | r = 0
  c8: CoefficientFormPDE "Particle - Electric potential - UP" on selection geom2_csel1_dom
    dependent variable UP
    Units.CustomSourceTermUnit = C/m^3
    cfeq1: CoefficientFormPDE (default) | c = {eps0*epsP, 0, 0, eps0*epsP}; f = 0
    zflx1: ZeroFluxBoundary "Zero Flux 1" (default)
    init1: init "Initial Values 1" (default) | UP = 1; UPt = 1
    flux1: FluxBoundary "Flux/Source 1" on selection sel7 | g = S + (nx*UWx + ny*UWy)*eps0*epsW
    dir1: DirichletBoundary "Dirichlet Boundary Condition 1" on selection sel7 | r = UW
  c3: CoefficientFormPDE "Water - Electric potential - UW" on selection sel3
    dependent variable UW
    Units.DependentVariableQuantity = none
    Units.CustomDependentVariableUnit = V
    Units.CustomSourceTermUnit = C/m^3
    cfeq1: CoefficientFormPDE (default) | c = {eps0*epsW, 0, 0, eps0*epsW}; f = F*(cp-cn); da = 0
    zflx1: ZeroFluxBoundary "Zero Flux 1" (default)
    init1: init "Initial Values 1" (default) | UW = 1; UWt = 1; U = 1; Ut = 1
    dir1: DirichletBoundary "Dirichlet Boundary Condition 1" on selection sel4 | r = -y*E0
    flux1: FluxBoundary "Flux/Source 1" on selection sel7 | g = S + (nx*UPx + ny*UPy)*eps0*epsP
    dir2: DirichletBoundary "Dirichlet Boundary Condition 2" on selection sel7 | r = UP
  cb2: CoefficientFormBoundaryPDE "Coefficient Form Boundary PDE - S" on selection sel7
    dependent variable S
    Units.CustomDependentVariableUnit = C / m^2
    Units.CustomSourceTermUnit = C / s / m^2
    cfeq1: CoefficientFormPDE (default) | c = {DS, 0, 0, DS}; a = i*freq*2*pi; ga = {-muS*sS*UWx, -muS*sS*UWy}
    init1: init "Initial Values 1" (default)

Mesh
  mesh2 "Mesh 2"
    size: MeshSizeDefault | hmax = L/10; hmin = pi*a/45; hcurve = 0.3; hgrad = 1.3; custom = on
    size1: Size on selection sel7 | hmax = pi*a/60; custom = on
    ftri1: FreeTri "Free Triangular 1" on remaining entities
    bl1: BndLayer "Boundary Layers 1" on entire geometry
      blp: BndLayerProp "Boundary Layer Properties" on selection sel7
        inittype = blhmin
        blhmin = lambda/10*2
        adjustdir = false
      blp1: BndLayerProp "Boundary Layer Properties 1" (disabled) on selection geom2_csel1_bnd
        inittype = blhmin
        blhmin = lambda/2
        adjustdir = false
      blp2: BndLayerProp "Boundary Layer Properties 2" (disabled) on selection geom2_csel1_bnd
        blnlayers = 24
        blstretch = 1.1
        inittype = blhmin
        blhmin = lambda/6
        adjustdir = false

Studies
  std2 "Stationary + Frequency Depenent Problem"
    stat: Stationary | solve for = {c2, c5}
    freq1: Frequency "Frequency Domain"
      plist = 10^{range(log10(0.1),6/59,log10(100000))}/2/pi
      solve for = {c6, c7, c8, c3, cb2}
  std1 "only Frequency Dependent Problem"
    freq: Frequency "Frequency Domain" (disabled)
      plist = 10^{range(-2,0.179487179487,5)}
      solve for = {c6, c7, c8, c3, cb2}
      usesol = on
      notsolmethod = sol
      notstudy = std2

Solver configurations
  sol1 "Solution 1" (study std2)
    v1: Variables "Abhängige Variablen 1"
    s1: Stationary "Stationärer Löser 1"
      dDef: Direct "Direkt"
      fc1: FullyCoupled "Vollständig gekoppelt 1" | linsolver = dDef
    su1: StoreSolution "Lösungsspeicher 1"
    v2: Variables "Abhängige Variablen 2" | initmethod = sol; notsolmethod = sol
    s2: Stationary "Stationärer Löser 2" | linpmethod = sol
      dDef: Direct "Direkt"
      p1: Parametric "Parametrisch 1"
        pname = freq
        plistarr = 10^{range(log10(0.1),6/59,log10(100000))}/2/pi
        punit = Hz
        pcontinuationmode = no
      fc1: FullyCoupled "Vollständig gekoppelt 1" | linsolver = dDef
  sol3 "Parametric Solutions 1" (study std2)

Datasets
  dset1: Solution | solution = sol1
  dset2: Solution | solution = sol3

Derived values
  pev1: EvalPoint "Point Evaluation 1" on points 2
    data = dset1
    table = tbl2
    expr = real( intopW(-D*F*d(c0*exp(-e/(kB*T)*U0W)+cp, y)+D*F*d(c0*exp(+e/(kB*T)*U0W)+cn, y)-F*mu*(c0*exp(-e/(kB * T)*U0W)+c0*exp(+e/(kB * T)*U0W)+cp+cn)*(U0Wy+UWy)-i*2*pi*freq*eps0*epsW*UWy)/Ka/E0 + intopP(-i*2*pi*freq*eps0*epsP*UPy)/Ka/E0 + intopS(i*2*pi*freq*(y-if(S==0, 0, intopS(y*(S+sS)) / intopS(S+sS)))*S)/Ka/E0) / (2*L)^2+i*imag( intopW(-D*F*d(c0*exp(-e/(kB*T)*U0W)+cp, y)+D*F*d(c0*exp(+e/(kB*T)*U0W)+cn, y)-F*mu*(c0*exp(-e/(kB * T)*U0W)+c0*exp(+e/(kB * T)*U0W)+cp+cn)*(U0Wy+UWy)-i*2*pi*freq*eps0*epsW*UWy)/Ka/E0 + intopP(-i*2*pi*freq*eps0*epsP*UPy)/Ka/E0 + intopS(i*2*pi*freq*(y-if(S==0, 0, intopS(y*(S+sS)) / intopS(S+sS)))*S)/Ka/E0) / (2*L)^2
  int1: IntLine "sigma_eff" on boundaries 3
    data = dset1
    table = tbl3
    expr = (-D*F*cpy+D*F*cny-F*mu*(c0+cp)*UWy-F*mu*(c0+cn)*UWy)/(sigma0*E0*2*L)

Plots
  pg24: PlotGroup1D "Real" | data = none
    glob1: Global "Num"
      expr = real( intopW(-D*F*d(c0*exp(-e/(kB*T)*U0W)+cp, y)+D*F*d(c0*exp(+e/(kB*T)*U0W)+cn, y)-F*mu*(c0*exp(-e/(kB * T)*U0W)+c0*exp(+e/(kB * T)*U0W)+cp+cn)*(U0Wy+UWy)-i*2*pi*freq*eps0*epsW*UWy)/Ka/E0 + intopP(-i*2*pi*freq*eps0*epsP*UPy)/Ka/E0 + intopS(i*2*pi*freq*(y-if(S==0, 0, intopS(y*(S+sS)) / intopS(S+sS)))*S)/Ka/E0) / (2*L)^2
      unit = 1
      descr = mit Korrektur
    glob2: Global "Ana" | expr = real(sanaL)
  pg33: PlotGroup2D "Particle - Static Electric potential - U0" | data = dset1
    surf1: Surface | expr = U0P
  pg34: PlotGroup2D "Water - Static Electric potential - U0" | data = dset1
    surf1: Surface | expr = U0W
  pg35: PlotGroup2D "Cations - p" | data = dset1
    surf1: Surface | expr = cp
  pg36: PlotGroup2D "Anions - n" | data = dset1
    surf1: Surface | expr = cn
  pg37: PlotGroup2D "Particle - Electric potential - UP" | data = dset1
    surf1: Surface | expr = UP
  pg38: PlotGroup2D "Water - Electric potential - UW" | data = dset1
    surf1: Surface | expr = if(dom==1,imag(UW),imag(UP))
    con1: Contour | expr = imag(UW)
  pg39: PlotGroup2D "Coefficient Form Boundary PDE - S" | data = dset1
    line1: Line | expr = S
  pg40: PlotGroup1D "1D Plot Group 40" | data = none
    tblp1: Table "Table Graph 1" | table = tbl2; imagplot = on
  pg41: PlotGroup2D "Particle - Static Electric potential - U0.1" | data = dset2
    surf1: Surface | expr = U0P
  pg42: PlotGroup2D "Water - Static Electric potential - U0.1" | data = dset2
    surf1: Surface | expr = U0W
  pg43: PlotGroup2D "Cations - p 1" | data = dset2
    surf1: Surface | expr = cp
  pg44: PlotGroup2D "Anions - n 1" | data = dset2
    surf1: Surface | expr = cn
  pg45: PlotGroup2D "Particle - Electric potential - UP 1" | data = dset2
    surf1: Surface | expr = UP
  pg46: PlotGroup2D "Water - Electric potential - UW 1" | data = dset2
    surf1: Surface | expr = UW
  pg47: PlotGroup2D "Coefficient Form Boundary PDE - S 1" | data = dset2
    line1: Line | expr = S