// COMSOL Multiphysics 6.4.0.293 model "two_particles_2d.mph"
// Outline of the model tree

Parameters
  sig = 0.01  // Surface charge density (C/m²)
  c0 = 1  // Bulk electrolyte concentration (mol/m³)
  w = 1e5*0+1  // Angular frequency (rad/s)
  E0 = 1  // External field strength (V/m)
  p = 0.5  // Partition coefficient (-)
  e = 1.602e-19  // Elementary charge (C)
  L = 10*a  // Domain length (m)
  ka = 2*mu*c0*F  // Bulk electrolyte conductivity (S/m)
  T = 293  // Absolute temperature (K)
  epsP = 4.5  // Relative permittivity of particle (-)
  a = 5e-6  // Particle radius (m)
  mu = 5e-8  // Ion mobility (m²/Vs)
  kB = 8.6173303e-5  // Boltzmann constant (eV/K)
  eps0 = 8.854187e-12  // Vacuum permittivity (F/m)
  epsW = 80  // Relative permittivity of electrolyte (-)
  F = 96485.3329  // Faraday constant (As/mol)
  tau = (a*a/(2*mu*kB*T))  // Relaxation time (s)
  NA = F/e
  muS = mu/10  // Ion mobility in Stern layer (m²/Vs)
  gNaS = sig/e*p  // Equivalent surface site density (1/m²)
  gNad = sig/e-gNaS  // Equivalent surface site density (1/m²)
  lambda = sqrt(eps0*epsW*kB*T/(2*c0*F))  // Surface site density Stern layer (1/m²)
  d = 2e-5  // Particle distance (m)
  phi = 0  // Angle between particle centers and electric field (°)

Variables
  var1 "Variablen 1"
    D = mu*kB*T  // Ion diffusivity (m²/s)
    DS = muS*kB*T  // Ion diffusivity in Stern layer (m²/s)
    kappa = 1/lambda  // Inverse Debye length (1/m²)
    sigma0 = 2*c0*mu*F  // Bulk electrolyte conductivity (S/m)

Geometry
  geom1 "Geometrie 1" (2D, length unit m)
    r1: Rectangle "Rechteck 1" | size = {2*L, 2*L}; pos = {-L, -L}
    c1: Circle "Kreis 1" | r = a; pos = {(a+d/2)*sin(phi/180*pi), (a+d/2)*cos(phi/180*pi)}
    c2: Circle "Kreis 1.1" | r = a; pos = {(-a-d/2)*sin(phi/180*pi), (-a-d/2)*cos(phi/180*pi)}
    fin: Finalize "Vereinigung bilden"

Physics
  c: CoefficientFormPDE "Stationary u0" on all domains
    dependent variable u
    cfeq1: CoefficientFormPDE "PDE, Koeffizientenform 1" (default)
      c = {eps0*if(dom==1,epsW,epsP), 0, 0, eps0*if(dom==1,epsW,epsP)}
      f = -2*if(dom==1,c0,0)*F*sinh(u/(kB*T))
      da = 0
    zflx1: ZeroFluxBoundary "Kein Fluss 1" (default)
    init1: init "Anfangswerte 1" (default)
    dir1: DirichletBoundary "Dirichlet-Randbedingung 1" on boundaries 1-4 | r = 0
    flux1: FluxBoundary "Fluss/Quelle 1" on boundaries 5-12 | g = -gNad*e
  c2: CoefficientFormPDE "FD p,n,u" on all domains
    dependent variable u2 = {u21, u22, u23}
    cfeq1: CoefficientFormPDE "PDE, Koeffizientenform 1" (default)
      c = 
        {D*if(dom==1,1,0), 0, 0, D*if(dom==1,1,0)}
        {0, 0, 0, 0}
        {0, 0, 0, 0}
        {0, 0, 0, 0}
        {D*if(dom==1,1,0), 0, 0, D*if(dom==1,1,0)}
        {0, 0, 0, 0}
        {-mu*c0*exp(u/(kB*T))*if(dom==1,1,0), 0, 0, -mu*c0*exp(u/(kB*T))*if(dom==1,1,0)}
        {mu*c0*exp(-u/(kB*T))*if(dom==1,1,0), 0, 0, mu*c0*exp(-u/(kB*T))*if(dom==1,1,0)}
        {eps0*if(dom==1,epsW,epsP), 0, 0, eps0*if(dom==1,epsW,epsP)}
      a = {i*w, 0, F*if(dom==1,1,0), 0, i*w, -F*if(dom==1,1,0), 0, 0, 0}
      f = {0, 0, 0}
      da = 0
      al = 
        {-mu*ux*if(dom==1,1,0), -mu*uy*if(dom==1,1,0)}
        {0, 0}
        {0, 0}
        {0, 0}
        {mu*ux*if(dom==1,1,0), mu*uy*if(dom==1,1,0)}
        {0, 0}
        {0, 0}
        {0, 0}
        {0, 0}
    zflx1: ZeroFluxBoundary "Kein Fluss 1" (default)
    init1: init "Anfangswerte 1" (default)
    dir1: DirichletBoundary "Dirichlet-Randbedingung 1" on boundaries 3
      r = {0, 0, -E0*L}
      useDirichletCondition = {1, 1, 1}
    dir2: DirichletBoundary "Dirichlet-Randbedingung 2" on boundaries 2
      r = {0, 0, E0*L}
      useDirichletCondition = {1, 1, 1}
    flux1: FluxBoundary "Fluss/Quelle 1" on boundaries 5-12 | g = {0, 0, u3*e}
  cb: CoefficientFormBoundaryPDE "FD Stern layer" on boundaries 5-12
    dependent variable u3
    cfeq1: CoefficientFormPDE "PDE, Koeffizientenform 1" (default)
      c = {DS, 0, 0, DS}
      a = i*w
      f = 0
      da = 0
      ga = {-muS*gNaS*u23x, -muS*gNaS*u23y}
    init1: init "Anfangswerte 1" (default)

Mesh
  mesh1 "Netz 1"
    size: MeshSizeDefault "Größe" | hmax = L/20*2; hmin = pi*a/400*2; hcurve = 0.25; hgrad = 1.25; custom = on
    size1: Size "Größe 1" on boundaries 5-12 | hmax = pi*a/400*2; custom = on
    ftri1: FreeTri "Freies Dreiecksnetz 1" on remaining entities
      smoothcontrol = on
      smoothmaxiter = 4
      smoothmaxdepth = 4
    bl1: BndLayer "Randschichten 1" on entire geometry
      blp: BndLayerProp "Randschichteigenschaften" on boundaries 5-12
        blnlayers = 8*2
        inittype = blhmin
        blhminfact = lambda/2
        blhmin = lambda/2/5

Studies
  std1 "Step 1: Stationary solution"
    stat: Stationary "Stationär" | solve for = {c}
  std2 "Step 2: Frequency-dependent solution"
    param: Parametric "Parametrischer Sweep" | pname = w; plistarr = 10^{range(-1,7/69,5)}
    stat: Stationary "Stationär" | solve for = {c2, cb}; usesol = on; notsolmethod = sol; notstudy = std1; notsol = sol1

Solver configurations
  sol1 "Lösung 1" (study std1)
    v1: Variables "Dependent Variables 1"
    s1: Stationary "Stationary Solver 1"
      dDef: Direct
      fc1: FullyCoupled | linsolver = dDef
  sol2 "Lösung 2" (study std2)
    v1: Variables "Dependent Variables 1"
    s1: Stationary "Stationary Solver 1"
      dDef: Direct
      p1: Parametric | pname = w; plistarr = 10^{range(-1,7/69,5)}; pcontinuationmode = no
      fc1: FullyCoupled | linsolver = dDef

Datasets
  dset1: Solution | solution = sol1
  dset2: Solution | solution = sol2

Derived values
  int1: IntLine "sigma_eff" on boundaries 3
    data = dset2
    table = tbl1
    expr = (-D*F*u21y+D*F*u22y-F*mu*(c0+u21)*u23y-F*mu*(c0+u22)*u23y)/(sigma0*E0*2*L)
    unit = 1
    descr = Normalized effective conductivity

Plots
  pg1: PlotGroup2D "2D-Plotgruppe 1" | data = dset2
    surf1: Surface "Oberfläche 1" | expr = imag(u23)
    con1: Contour
      expr = imag(u23)
      levelmethod = levels
      levels = {-8e-9, -7e-9, -6e-9, -5e-9, -4e-9, -3e-9, -2e-9, -1e-9, 0, 1e-9, 2e-9, 3e-9, 4e-9, 5e-9, 6e-9, 7e-9, 8e-9}
      includeoutside = off
  pg2: PlotGroup2D "2D-Plotgruppe 2" | data = dset2
    surf1: Surface "Oberfläche 1" | expr = imag(u23)
  pg3: PlotGroup2D "2D-Plotgruppe 3" | data = dset2
    line1: Line "Linie 1" | expr = u3
  pg6: PlotGroup2D "PDE, Koeffizientenform" | data = dset1
    surf1: Surface | expr = u
  pg7: PlotGroup1D "1D Plot Group 7" | data = none
    tblp1: Table "Table Graph 1" | table = tbl1; imagplot = on
  pg8: PlotGroup2D "2D-Plotgruppe 8" on domains 1 | data = dset2
    surf1: Surface "Oberfläche 1" | expr = imag(u23)
    con1: Contour
      expr = imag(u23)
      levelmethod = levels
      levels = {-8e-10, -7e-10, -6e-10, 5e-10, -4e-10, -3e-10, -2e-10, -1e-10, 0, 1e-10, 2e-10, 3e-10, 4e-10, 5e-10, 6e-10, 7e-10, 8e-10}
      includeoutside = off